# Input variables
variable run    string 02_cg_slab_01
variable ts     equal  20.          # timestep
variable tf     equal  300.         # Equilibrium temperature
variable cutoff equal  14.          # For interactions in real space
variable skin   equal  4.           # Skin distance for neighbour list
variable s      equal  5            # sample interval for averaging
variable cl     equal  200          # correlation length for averaging
variable prod   equal  50000        # Equilibration steps (1 ns)


# Force field setup.
boundary        p p p
units           real
atom_style hybrid molecular ellipsoid
bond_style ellipsoid
special_bonds lj/coul 0.0 0.2 0.5
# gamma upsilon mu lj_cutoff coul_cutoff
pair_style molc/cut 1 1 -3 ${cutoff} ${cutoff}

# Neighbour list.
neighbor        ${skin} bin
